# OpenSim document version 40000
ForwardTool fd_:
  model_file: arm2musc.osim
  replace_force_set: false
  results_directory: forward_dyanmics_results
  output_precision: 8
  initial_time: 0.55
  final_time: 2.945
  solve_for_equilibrium_for_auxiliary_states: true
  maximum_number_of_integrator_steps: 20000
  maximum_integrator_step_size: 0.0001
  minimum_integrator_step_size: 1e-8
  integrator_error_tolerance: 1e-5
  use_specified_dt: false
  AnalysisSet Analyses:
    MuscleAnalysis: start_time=0.55 end_time=2.945 step_interval=1 in_degrees=true muscle_list=all
        moment_arm_coordinate_list=all compute_moments=true
    BodyKinematics: start_time=0.55 end_time=2.945 step_interval=1 in_degrees=true bodies=all
        express_results_in_body_local_frame=false
  ControllerSet Controllers:
    ControlSetController: controls_file=hybrid-cpg_excitation.sto
